# Power consumtion - ImageCompressionApp
R_shunt := 10 Ω
V_batt := 2.000 V
V_idle := 18.000 mV
I_idle := V_idle/R_shunt = 1.8 mA
P_idle := I_idle*V_batt = 3.6 mW
V_send.raw := 200.000 mV
I_send.raw := V_send.raw/R_shunt = 20 mA
P_send.raw := I_send.raw*V_batt = 40 mW
V_send.comp := 2.100 mV
I_send.comp := V_send.comp/R_shunt = 0.21 mA
P_send.comp := I_send.comp*V_batt = 0.42 mW
t_send.raw := 10.02 s
E_send.raw := P_send.raw*t_send.raw
t_send.comp := 10.02 s
E_send.comp := P_send.comp*t_send.comp
E_send.raw = 0.4008 J
E_send.comp = 0.0042084 J
